<?xml version="1.0"?>
<!-- Generated by Aero-Matic v 1.1

     Inputs:
                horsepower: 2550.0
                     pitch: variable
            max engine rpm: 15100
        prop diameter (ft): 9.843

     Outputs:
              max prop rpm: 1906.23
                gear ratio:    7.92
                       Cp0: 0.199060
                       Ct0: 0.463809
       static thrust (lbs): 10449.79
-->

<propeller name="prop_AV72">
  <ixx>  73.579 </ixx> <!-- real value -->
  <!--ixx unit="KG*M2">  99.76 </ixx-->
  <diameter unit="M">   3.9 </diameter>
  <numblades> 4 </numblades>
  <gearratio> 12.11341 </gearratio>
  <constspeed> 0 </constspeed>
  <p_factor>   0.33 </p_factor>
  <minpitch> 8 </minpitch>
  <maxpitch> 92.5 </maxpitch>
  <minrpm>   1240 </minrpm>
  <maxrpm>   1250 </maxrpm>
  <ct_factor> 1 </ct_factor>
  <cp_factor> 1 </cp_factor>
 <!-- thrust coefficient as a function of advance ratio and blade angle -->
  <table name="C_THRUST" type="internal">
      <tableData>
		8	11	14	17	20	23	26	29	32	35	38	41	44	47	50	53
0		0.0339	0.0545	0.0736	0.0989	0.1245	0.1504	0.1718	0.2052	0.2371	0.242	0.2464	0.2544	0.2566	0.2566	0.2649	0.2716
0.0858133388	0.0124	0.0332	0.054	0.0797	0.1059	0.1328	0.1599	0.1899	0.2172	0.2233	0.2381	0.2483	0.253	0.2554	0.2638	0.2701
0.1716266777	-0.0091	0.0119	0.0344	0.0605	0.0875	0.1151	0.1434	0.1758	0.1988	0.2153	0.2298	0.2421	0.2495	0.2542	0.2627	0.2688
0.2574400165	-0.0304	-0.0093	0.0148	0.0414	0.069	0.0975	0.1268	0.1616	0.1859	0.2072	0.2216	0.236	0.2459	0.253	0.2616	0.2673
0.3432533553	-0.0518	-0.0305	-0.0048	0.0223	0.0505	0.0799	0.1103	0.1479	0.171	0.1991	0.2133	0.2299	0.2423	0.2518	0.2606	0.2659
0.4290666941	-0.0787	-0.0568	-0.0294	-0.001	0.0287	0.0596	0.0914	0.1275	0.1599	0.1823	0.2033	0.2224	0.2367	0.2477	0.2572	0.2631
0.514880033	-0.1107	-0.0876	-0.0585	-0.028	0.0038	0.0366	0.062	0.082	0.1462	0.1695	0.1917	0.2135	0.2292	0.2408	0.2517	0.2591
0.6006933718	-0.1441	-0.1198	-0.0889	-0.056	-0.022	0.0129	0.048	0.063	0.1303	0.1552	0.1796	0.2042	0.2211	0.2331	0.2456	0.2548
0.6865067106	-0.1775	-0.1519	-0.1193	-0.0841	-0.0478	-0.0108	0.0272	0.0672	0.1168	0.141	0.1675	0.1949	0.2131	0.2253	0.2395	0.2505
0.7723200494	-0.211	-0.184	-0.1496	-0.1122	-0.0736	-0.0344	0.0056	0.0475	0.0934	0.1308	0.155	0.1857	0.2049	0.2176	0.2334	0.2461
0.8581333883	-0.2443	-0.2161	-0.18	-0.1402	-0.0993	-0.0581	-0.0161	0.0277	0.05	0.1126	0.1463	0.1765	0.1968	0.2099	0.2274	0.2417
0.9439467271	-0.2777	-0.2483	-0.2105	-0.1684	-0.1251	-0.0819	-0.0377	0.0079	0.042	0.0995	0.132	0.1672	0.1888	0.2022	0.2213	0.2373
1.0297600659	-0.3165	-0.2855	-0.246	-0.2019	-0.1567	-0.1115	-0.0656	-0.0183	0.027	0.087	0.1128	0.1513	0.1757	0.1909	0.2137	0.2324
1.1155734047	-0.3628	-0.3299	-0.2887	-0.2429	-0.1961	-0.1494	-0.1019	-0.0535	0.015	0.054	0.099	0.13	0.1556	0.1745	0.2036	0.2264
1.2013867436	-0.4098	-0.3749	-0.3321	-0.2847	-0.2363	-0.188	-0.1392	-0.0895	0.01	0.029	0.078	0.11	0.1348	0.1575	0.1934	0.2203
1.2872000824	-0.4568	-0.4199	-0.3755	-0.3265	-0.2766	-0.2267	-0.1764	-0.1255	-0.0749	0.012	0.033	0.088	0.122	0.1406	0.1833	0.2143
1.3730134212	-0.5041	-0.4651	-0.4191	-0.3686	-0.3171	-0.2656	-0.2139	-0.162	-0.1101	0.001	0.005	0.065	0.1008	0.1233	0.1726	0.2077
1.45882676	-0.5529	-0.5117	-0.464	-0.4122	-0.3593	-0.3064	-0.2535	-0.2005	-0.1472	-0.0943	-0.002	0.022	0.077	0.1105	0.1585	0.1976
1.5446400989	-0.6052	-0.5614	-0.5122	-0.4595	-0.4056	-0.3518	-0.2979	-0.2437	-0.1887	-0.1337	-0.0774	0	0.031	0.089	0.121	0.1796
1.6304534377	-0.6607	-0.6139	-0.5633	-0.5099	-0.4555	-0.401	-0.3465	-0.291	-0.234	-0.1767	-0.1185	-0.0569	0.005	0.06	0.0988	0.1547
1.7162667765	-0.7162	-0.6664	-0.6144	-0.5603	-0.5053	-0.4501	-0.395	-0.3384	-0.2794	-0.2196	-0.1594	-0.0971	-0.018	0.02	0.076	0.118
1.8020801153	-0.7705	-0.7179	-0.6645	-0.6097	-0.5542	-0.4982	-0.4424	-0.3847	-0.3236	-0.2616	-0.1994	-0.1364	-0.0748	-0.0142	0.0519	0.1051
1.8878934542	-0.8159	-0.7617	-0.7072	-0.6522	-0.5958	-0.5389	-0.482	-0.4229	-0.3602	-0.2963	-0.2325	-0.1684	-0.1048	-0.0401	0.0276	0.0839
1.973706793	-0.8511	-0.7965	-0.7418	-0.6866	-0.6294	-0.571	-0.5125	-0.4521	-0.3882	-0.3229	-0.2576	-0.1923	-0.1272	-0.0608	0.0076	0.0664
      </tableData>
  </table>

 <!-- power coefficient as a function of advance ratio and blade angle -->
  <table name="C_POWER" type="internal">
     <tableData>
		8	11	14	17	20	23	26	29	32	35	38	41	44	47	50	53
0		0.0289	0.0237	0.0324	0.043	0.0543	0.0671	0.0948	0.1613	0.1987	0.2394	0.2802	0.3224	0.3683	0.4172	0.4661	0.5149
0.0858133388	0.0286	0.0233	0.0308	0.0406	0.0458	0.0521	0.0821	0.1498	0.1931	0.2387	0.288	0.3385	0.392	0.4482	0.5049	0.5632
0.1716266777	0.0284	0.0231	0.0291	0.0383	0.0309	0.0453	0.0749	0.1372	0.1829	0.2296	0.2837	0.3387	0.3954	0.4544	0.5143	0.5775
0.2574400165	0.0282	0.0228	0.0275	0.0358	0.0249	0.0416	0.07	0.1249	0.1717	0.2181	0.2754	0.3334	0.3918	0.4519	0.5132	0.5797
0.3432533553	0.0279	0.0224	0.0258	0.0334	0.0206	0.0379	0.0648	0.1118	0.1593	0.2053	0.2654	0.3259	0.3856	0.4463	0.5088	0.578
0.4290666941	0.0276	0.0221	0.0242	0.0311	0.0192	0.037	0.0623	0.1014	0.1495	0.1947	0.2575	0.3202	0.3808	0.4419	0.5052	0.5768
0.514880033	0.0263	0.0198	0.0202	0.0258	0.015	0.0326	0.0568	0.091	0.1394	0.1849	0.2498	0.3144	0.3767	0.4392	0.5043	0.5785
0.6006933718	0.0231	0.014	0.0118	0.015	0.0074	0.0238	0.047	0.083	0.1267	0.1731	0.2376	0.3028	0.3663	0.4306	0.4977	0.5734
0.6865067106	0.0185	0.0056	-0.0001	-0.0001	0.0015	0.0157	0.0375	0.0681	0.1133	0.1602	0.2222	0.2865	0.3503	0.4154	0.4839	0.5594
0.7723200494	0.0134	-0.0036	-0.013	-0.0165	-0.0078	0.0044	0.0254	0.0553	0.0993	0.148	0.2092	0.2742	0.34	0.408	0.4799	0.5573
0.8581333883	0.0084	-0.0128	-0.0259	-0.033	-0.0264	-0.0155	0.0055	0.0355	0.0798	0.1318	0.1943	0.262	0.332	0.4047	0.482	0.5637
0.9439467271	0.0033	-0.0221	-0.0389	-0.0495	-0.04	-0.0306	-0.0101	0.0196	0.0636	0.1178	0.1806	0.2498	0.3227	0.3989	0.4802	0.5647
1.0297600659	-0.0023	-0.0306	-0.0505	-0.064	-0.044	-0.0369	-0.019	0.0078	0.0482	0.0996	0.1584	0.2247	0.2956	0.3704	0.4501	0.5322
1.1155734047	-0.0086	-0.0379	-0.0602	-0.076	-0.0425	-0.0385	-0.0239	-0.0008	0.0351	0.0816	0.1363	0.1993	0.2684	0.3421	0.4198	0.4993
1.2013867436	-0.015	-0.0452	-0.0697	-0.0877	-0.0451	-0.044	-0.0332	-0.0142	0.0166	0.0571	0.1064	0.1647	0.2303	0.3011	0.375	0.4501
1.2872000824	-0.0214	-0.0526	-0.0792	-0.0994	-0.0681	-0.0701	-0.0621	-0.0456	-0.017	0.0215	0.0702	0.1294	0.198	0.273	0.3503	0.4285
1.3730134212	-0.0277	-0.0599	-0.0887	-0.1111	-0.0881	-0.0929	-0.0881	-0.0745	-0.0493	-0.0144	0.0318	0.0896	0.1586	0.2346	0.3122	0.3903
1.45882676	-0.0341	-0.0676	-0.0988	-0.1237	-0.1021	-0.1098	-0.1084	-0.0984	-0.0774	-0.0471	-0.0046	0.0501	0.1175	0.1927	0.2685	0.3447
1.5446400989	-0.0409	-0.0788	-0.1146	-0.1438	-0.1298	-0.1414	-0.1438	-0.1369	-0.1189	-0.0909	-0.0499	0.0039	0.0717	0.1485	0.2268	0.306
1.6304534377	-0.0482	-0.0944	-0.1372	-0.1733	-0.1646	-0.1807	-0.1871	-0.1831	-0.1679	-0.1412	-0.1014	-0.0487	0.0181	0.0952	0.1763	0.2599
1.7162667765	-0.0554	-0.11	-0.1599	-0.2029	-0.1925	-0.213	-0.2236	-0.2226	-0.2103	-0.1848	-0.1463	-0.095	-0.0293	0.0482	0.1319	0.2199
1.8020801153	-0.0626	-0.1257	-0.1824	-0.2324	-0.2729	-0.3027	-0.32	-0.322	-0.3097	-0.2797	-0.2337	-0.1721	-0.0926	0.0029	0.1085	0.2213
1.8878934542	-0.0698	-0.1411	-0.2049	-0.2617	-0.3085	-0.3437	-0.3659	-0.371	-0.3613	-0.3317	-0.2857	-0.2236	-0.1427	-0.0439	0.0677	0.1886
1.973706793	-0.0773	-0.1517	-0.2192	-0.28	-0.3302	-0.3681	-0.3922	-0.3993	-0.3922	-0.3653	-0.3222	-0.2634	-0.186	-0.0893	0.0218	0.1427
     </tableData>
  </table>

<!-- thrust effects of helical tip Mach -->
<table name="CT_MACH" type="internal">
  <tableData>
    0.85   1.0
    1.05   0.8
  </tableData>
</table>

<!-- power-required effects of helical tip Mach -->
<table name="CP_MACH" type="internal">
  <tableData>
    0.85   1.0
    1.05   1.8
    2.00   1.4
  </tableData>
</table>

</propeller>
